*Heading
** Job name: chkflap Model name: Model-2
** Generated by: Abaqus/CAE 2021
*Preprint, echo=NO, model=NO, history=NO, contact=NO
**
** PARTS
**
*Part, name=Part-622
*End Part
**
**
** ASSEMBLY
**
*Assembly, name=Assembly
**
*Instance, name=Part-622-1, part=Part-622
*Node
      1, -0.100000001,           0., -0.239999995
      2, -0.0900000036,           0.,        -0.25
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*Element, type=S4R
 1,   1,  17, 657,  58
 2,  17,  18, 658, 657
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** Region: (Connector-1: Generated From Layup)
*Elset, elset=Connector-1, generate
   1,  360,    1
** Section: Connector-1
*Shell Section, elset=Connector-1, composite, layup=Connector
4e-05, 3, Thin-Ply, 0., Ply-1
4e-05, 3, Thin-Ply, 0., Ply-2
4e-05, 3, Thin-Ply, 0., Ply-3
4e-05, 3, Thin-Ply, 0., Ply-4
*Orientation, name=Ori-2
1., 0., 0., 0., 1., 0.
2, 0.
** Region: (Symm-1: Generated From Layup)
*Elset, elset=Symm-1
  361,  362,  363,  364,  365,  366
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** Section: Symm-1
*Shell Section, elset=Symm-1, composite, orientation=Ori-2, layup=Symm
0.000131, 3, Composite, 0., Ply-1
0.000131, 3, Composite, 0., Ply-2
0.000131, 3, Composite, 0., Ply-3
0.000131, 3, Composite, 0., Ply-4
0.000131, 3, Composite, 0., Ply-1-Copy1
0.000131, 3, Composite, 0., Ply-2-Copy1
0.000131, 3, Composite, 0., Ply-3-Copy1
0.000131, 3, Composite, 0., Ply-4-Copy1
0.000131, 3, Composite, 0., Ply-1-Copy2
0.000131, 3, Composite, 0., Ply-2-Copy2
0.000131, 3, Composite, 0., Ply-3-Copy2
0.000131, 3, Composite, 0., Ply-4-Copy2
0.000131, 3, Composite, 0., Ply-1-Copy1-Copy1
0.000131, 3, Composite, 0., Ply-2-Copy1-Copy1
0.000131, 3, Composite, 0., Ply-3-Copy1-Copy1
0.000131, 3, Composite, 0., Ply-4-Copy1-Copy1
** Region: (Unsymm-1: Generated From Layup)
*Elset, elset=Unsymm-1, generate
 1189,  3852,     1
** Section: Unsymm-1
*Shell Section, elset=Unsymm-1, composite, layup=Unsymm
0.000131, 3, Composite, 90., Ply-1
0.000131, 3, Composite, 90., Ply-2
0.000131, 3, Composite, 0., Ply-3
0.000131, 3, Composite, 0., Ply-4
*End Instance
**
*Nset, nset=Allgeo, instance=Part-622-1, generate
    1,  4940,     1
*Elset, elset=Allgeo, instance=Part-622-1, generate
    1,  4680,     1
*Nset, nset="Edge Seeds-1", instance=Part-622-1
   1,   2,   3,   4,   5,   6
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*Elset, elset="Edge Seeds-1", instance=Part-622-1
  361,  378,  379,  396,  397,  414
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*Nset, nset=center1, instance=Part-622-1
 1311,
*Nset, nset=center2, instance=Part-622-1
 4558,
*Nset, nset=center3, instance=Part-622-1
 3555,
*Nset, nset=center4, instance=Part-622-1
 2314,
*End Assembly
**
** MATERIALS
**
*Material, name=Composite
*Elastic, type=LAMINA
 1.64e+11, 1.2e+10,     0.3, 4.6e+09, 4.6e+09, 4.6e+09
*Expansion, type=ORTHO
 -1.8e-08, 3e-05,    0.
*Material, name=Thin-Ply
*Elastic, type=LAMINA
 1.57e+11, 9.4e+09,    0.35, 5.2e+09, 5.2e+09, 5.2e+09
*Expansion, type=ORTHO
 -9e-08, 2.65e-05,       0.
**
** BOUNDARY CONDITIONS
**
** Name: BC-1 Type: Displacement/Rotation
*Boundary
center1, 1, 1
center1, 2, 2
center1, 3, 3
center1, 4, 4
center1, 5, 5
center1, 6, 6
** Name: BC-2 Type: Displacement/Rotation
*Boundary
center2, 1, 1
center2, 2, 2
center2, 3, 3
center2, 4, 4
center2, 5, 5
center2, 6, 6
** Name: BC-3 Type: Displacement/Rotation
*Boundary
center3, 1, 1
center3, 2, 2
center3, 3, 3
center3, 4, 4
center3, 5, 5
center3, 6, 6
** Name: BC-4 Type: Displacement/Rotation
*Boundary
center4, 1, 1
center4, 2, 2
center4, 3, 3
center4, 4, 4
center4, 5, 5
center4, 6, 6
**
** PREDEFINED FIELDS
**
** Name: Predefined Field-1   Type: Temperature
*Initial Conditions, type=TEMPERATURE
Allgeo, 200.
** ----------------------------------------------------------------
**
** STEP: Step-1
**
*Step, name=Step-1, nlgeom=YES, inc=2000
*Static, stabilize, factor=0.0002, allsdtol=0.05, continue=NO
0.0001, 1., 1e-31, 0.1
**
** PREDEFINED FIELDS
**
** Name: Predefined Field-1   Type: Temperature
*Temperature
Allgeo, 20.
**
** OUTPUT REQUESTS
**
*Restart, write, frequency=0
**
** FIELD OUTPUT: F-Output-1
**
*Output, field, variable=PRESELECT
**
** HISTORY OUTPUT: H-Output-1
**
*Output, history, variable=PRESELECT
*End Step
** ----------------------------------------------------------------
**
** STEP: Eqm Step
**
*Step, name="Eqm Step", nlgeom=YES, inc=2000
*Static, stabilize, factor=0.0002, allsdtol=0.05, continue=NO
1e-05, 1., 1e-31, 0.1
**
** BOUNDARY CONDITIONS
**
** Name: BC-1 Type: Displacement/Rotation
*Boundary, op=NEW
center1, 1, 1
center1, 2, 2
center1, 3, 3
center1, 4, 4
center1, 5, 5
center1, 6, 6
** Name: BC-2 Type: Displacement/Rotation
*Boundary, op=NEW
center2, 2, 2
center2, 3, 3
center2, 4, 4
center2, 5, 5
center2, 6, 6
** Name: BC-3 Type: Displacement/Rotation
*Boundary, op=NEW
center3, 1, 1
center3, 2, 2
center3, 6, 6
** Name: BC-4 Type: Displacement/Rotation
*Boundary, op=NEW
center4, 1, 1
center4, 2, 2
center4, 6, 6
**
** OUTPUT REQUESTS
**
*Restart, write, frequency=0
**
** FIELD OUTPUT: F-Output-1
**
*Output, field, variable=PRESELECT
**
** HISTORY OUTPUT: H-Output-1
**
*Output, history, variable=PRESELECT
*End Step
** ----------------------------------------------------------------
**
** STEP: Loading
**
*Step, name=Loading, nlgeom=YES, inc=2000
*Static, stabilize=0.2, allsdtol=0.5, continue=NO
0.01, 1., 1e-31, 1.
**
** LOADS
**
** Name: Load-1   Type: Concentrated force
*Cload
center3, 3, -500.
** Name: Load-2   Type: Concentrated force
*Cload
center4, 3, 500.
**
** OUTPUT REQUESTS
**
*Restart, write, frequency=0
**
** FIELD OUTPUT: F-Output-1
**
*Output, field, variable=PRESELECT
**
** HISTORY OUTPUT: H-Output-1
**
*Output, history, variable=PRESELECT
*End Step
** ----------------------------------------------------------------
**
** STEP: Unloading
**
*Step, name=Unloading, nlgeom=YES, inc=1000
*Static, stabilize, factor=0.0002, allsdtol=0.05, continue=NO
0.0001, 1., 1e-31, 0.1
**
** LOADS
**
** Name: Load-1   Type: Concentrated force
*Cload
center3, 3, 0.
** Name: Load-2   Type: Concentrated force
*Cload
center4, 3, 0.
**
** OUTPUT REQUESTS
**
*Restart, write, frequency=0
**
** FIELD OUTPUT: F-Output-1
**
*Output, field, variable=PRESELECT
**
** HISTORY OUTPUT: H-Output-1
**
*Output, history, variable=PRESELECT
*End Step
